*Heading
** Job name: Task6_Mesh40_core Model name: Task6_Mesh40_core
** Generated by: Abaqus/CAE 2019
*Preprint, echo=NO, model=NO, history=NO, contact=NO
**
** PARTS
**
*Part, name=Block
*Node
      1,         -0.5, 0.00999999978,           2.
      2,         -0.5,  0.259749979,           2.
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****************************************************************
** ---------------- Element type definition ------------------
*********************** HEXAGONAL ***************************
** ---------------- Displacement ----------------
*User element, nodes=8, type=U2, properties=10, coordinates=3, VARIABLES=344
1,2,3
** ---------------- Phase-field ----------------
*User element, nodes=8, type=U4, properties=3, coordinates=3, VARIABLES=24
4
***************************************************************
** ---------------- Element definition ------------------
***************************************************************
** ---------------- Displacement ----------------
*Element, type=U2
   1,  190,  191,  212,  211,    1,    2,   23,   22
   2,  191,  192,  213,  212,    2,    3,   24,   23
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***************************************************************
** ---------------- Phase-field ----------------
*Element, type=U4
6401,  190,  191,  212,  211,    1,    2,   23,   22
6402,  191,  192,  213,  212,    2,    3,   24,   23
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***************************************************************
********************** ASSIGNING MATERIAL PROP ****************
** ---------------- Generate sets ----------------
*Elset, elset=Block, generate
     1,  6400,      1
***************************************************************
*Uel property, elset=Block
210, 0.3, 365, 0, 0, 2.785e-9, 0, 0,
0.5, 3
**E, nu, Y, H, eps_cr, rho, anisoswt, plswt,
**lc, gc
***************************************************************
*Elset, elset=Block_PH, generate
6401, 12800, 1
***************************************************************
*Uel property, elset=Block_PH
0.5, 3, 0
**lc, gc, elswt
***************************************************************
** ---------------- UMAT element layer ----------------
*Element, type=C3D8
12801,  190,  191,  212,  211,    1,    2,   23,   22
12802,  191,  192,  213,  212,    2,    3,   24,   23
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*Nset, nset=umatelem, generate
    1,  7821,     1
*Elset, elset=umatelem, generate
 12801,  19200,      1
** Section: umatelem
*Solid Section, elset=umatelem, material=umaterial
,
*End Part
**
**
** ASSEMBLY
**
*Assembly, name=Assembly
**
*Instance, name=Block-1, part=Block
*End Instance
**
*Nset, nset=BTM, instance=Block-1
 1714, 1719, 1724, 1725, 1736, 1737
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*Elset, elset=BTM, instance=Block-1
 14081, 14082, 14083, 14084, 14085, 14086
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*Nset, nset=TOP, instance=Block-1
   21,   42,   63,   84,  105,  126
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*Elset, elset=TOP, instance=Block-1
 12820, 12840, 12860, 12880, 12900, 12920
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*Elset, elset=_btm_S4, internal, instance=Block-1, generate
 15400,  19200,     40
*Elset, elset=_btm_S2, internal, instance=Block-1, generate
 14081,  14144,      1
*Surface, type=ELEMENT, name=btm
_btm_S4, S4
_btm_S2, S2
*Elset, elset=_top_S4, internal, instance=Block-1, generate
 12820,  14080,     20
*Elset, elset=_top_S6, internal, instance=Block-1, generate
 15361,  19161,     40
*Surface, type=ELEMENT, name=top
_top_S4, S4
_top_S6, S6
*Elset, elset=umatelem, instance=Block-1, generate
 12801,  19200,      1
**
*End Assembly
*Amplitude, name=Amp-1, time=TOTAL TIME
             0.,              0.,              5.,            1
**
** MATERIALS
**
** ----- UMAT MATERIAL -----
*Material, name=umaterial
*Density
 1e-11,
*Depvar
     34,
*User Material, constants=2
 1e-11, 0.3
** ----------------------------------------------------------------
**
** STEP: Step-1
**
** ---- Time integration control
*Step, name=Step-1, nlgeom=NO, inc=500
*Static, direct
0.01, 5,
** BOUNDARY CONDITIONS
**
** Name: BTM Type: Displacement/Rotation
*Boundary
BTM, 1, 1
BTM, 2, 2
BTM, 3, 3
** Name: TOP Type: Displacement/Rotation
*Boundary, amplitude=Amp-1
TOP, 2, 2, 1.
**
** OUTPUT REQUESTS
**
*Restart, write, frequency=0
**
** FIELD OUTPUT: F-Output-1
**
*Output, field
*Node Output
RF, U
**
** HISTORY OUTPUT: H-Output-1
**
*element output, elset=umatelem
SDV
**
*End Step
